Mon 06 Feb 2023 04:38:08 PM CET
$PROB Logistic Regression

$INPUT C ID DV SEX

$DATA ../Dataset.csv IGNORE=@

$PRED
LOGIT = THETA(1)+ETA(1)
A = EXP(LOGIT)
P = A / (1+A)

IF(DV.EQ.1) Y=P
IF(DV.EQ.0) Y=1-P

$THETA
(10) ; beta0; Intercept; /

$OMEGA
0.0001 	; Res; Between subject variability; /

$ESTIMATION MAXEVAL=9999 PRINT=5 METHOD=COND LAPLACE LIKELIHOOD NOABORT MSF=./logreg.msf

$COV MATRIX=R PRINT=E

$TABLE C ID DV SEX ETA1 PRED RES WRES ONEHEADER NOPRINT FILE=logreg.tab

NM-TRAN MESSAGES
 WARNINGS AND ERRORS (IF ANY) FOR PROBLEM    1
 (WARNING  2) NM-TRAN INFERS THAT THE DATA ARE POPULATION.
 (WARNING  3) THERE MAY BE AN ERROR IN THE ABBREVIATED CODE. THE FOLLOWING
 ONE OR MORE RANDOM VARIABLES ARE DEFINED WITH "IF" STATEMENTS THAT DO NOT
 PROVIDE DEFINITIONS FOR BOTH THE "THEN" AND "ELSE" CASES. IF ALL
 CONDITIONS FAIL, THE VALUES OF THESE VARIABLES WILL BE ZERO.
   Y
 (WARNING  13) WITH USER-WRITTEN PRED OR $PRED, NM-TRAN CANNOT APPEND THE
 MDV DATA ITEM.

1NONLINEAR MIXED EFFECTS MODEL PROGRAM (NONMEM) VERSION 7.4.3
 ORIGINALLY DEVELOPED BY STUART BEAL, LEWIS SHEINER, AND ALISON BOECKMANN
 CURRENT DEVELOPERS ARE ROBERT BAUER, ICON DEVELOPMENT SOLUTIONS,
 AND ALISON BOECKMANN. IMPLEMENTATION, EFFICIENCY, AND STANDARDIZATION
 PERFORMED BY NOUS INFOSYSTEMS.
 PROBLEM NO.:         1
 Logistic Regression
 TOT. NO. OF OBS RECS:       20
 TOT. NO. OF INDIVIDUALS:       20
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 #TBLN:      1
 #METH: Laplacian Conditional Estimation
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
 #TERM:
0MINIMIZATION TERMINATED
 DUE TO ROUNDING ERRORS (ERROR=134)
 NO. OF FUNCTION EVALUATIONS USED:      193
 NO. OF SIG. DIGITS IN FINAL EST.:  2.4

 ETABAR IS THE ARITHMETIC MEAN OF THE ETA-ESTIMATES,
 AND THE P-VALUE IS GIVEN FOR THE NULL HYPOTHESIS THAT THE TRUE MEAN IS 0.

 ETABAR:        -2.8521E-15
 SE:             1.6783E-09
 N:                      20

 P VAL.:         1.0000E+00

 ETASHRINKSD(%)  9.9994E+01
 ETASHRINKVR(%)  1.0000E+02
 EBVSHRINKSD(%)  9.9994E+01
 EBVSHRINKVR(%)  1.0000E+02
 EPSSHRINKSD(%)  1.0000E+02
 EPSSHRINKVR(%)  1.0000E+02


 TOTAL DATA POINTS NORMALLY DISTRIBUTED (N):            0
 N*LOG(2PI) CONSTANT TO OBJECTIVE FUNCTION:    0.0000000000000000
 OBJECTIVE FUNCTION VALUE WITHOUT CONSTANT:    26.920466680373188
 OBJECTIVE FUNCTION VALUE WITH CONSTANT:       26.920466680373188
 REPORTED OBJECTIVE FUNCTION DOES NOT CONTAIN CONSTANT

 TOTAL EFFECTIVE ETAS (NIND*NETA):                            20


 #TERE:
 Elapsed estimation  time in seconds:     0.02
 Elapsed postprocess time in seconds:     0.01

 ********************                         LAPLACIAN CONDITIONAL ESTIMATION                       ********************
 #OBJT:**************                       MINIMUM VALUE OF OBJECTIVE FUNCTION                      ********************
 #OBJV:********************************************       26.920       **************************************************

 ********************                         LAPLACIAN CONDITIONAL ESTIMATION                       ********************
 ********************                             FINAL PARAMETER ESTIMATE                           ********************

 THETA - VECTOR OF FIXED EFFECTS PARAMETERS   *********
         TH 1
         4.05E-01

 OMEGA - COV MATRIX FOR RANDOM EFFECTS - ETAS  ********
         ETA1
 ETA1
+        1.53E-08

 OMEGA - CORR MATRIX FOR RANDOM EFFECTS - ETAS  *******
         ETA1
 ETA1
+        1.24E-04
 Elapsed finaloutput time in seconds:     0.00
 #CPUT: Total CPU Time in Seconds,        0.033
