Thu Oct  5 13:59:03 EDT 2017
$PROBLEM    //like/2001//but/1 cmt,diag. omega,prop. err.//
$INPUT      C ID TIME SEQ=DROP EVID AMT DV SUBJ HOUR HEIGHT WT SEX AGE
            DOSE FED
$DATA      drug.csv IGNORE=C
$SUBROUTINE ADVAN2 TRANS2
$PK
 CL=THETA(1)*EXP(ETA(1))
 V =THETA(2)*EXP(ETA(2))
 KA=THETA(3)*EXP(ETA(3))
 S1=V

$ERROR
 Y=F*(1+ERR(1))
 IPRE=F

$THETA  (0,10,50) ; CL/F; clearance                                     ;L/h
 (0,10,100) ; Vc/F; central volume                                ;L
 (0,0.2,5) ; Ka; absorption rate constant                      ;1/h
$OMEGA  0.1  ;     IIV_CL  ; interindividual variability on clearance
 0.1  ;     IIV_Vc  ; interindividual variability on central volume
 0.1  ;     IIV_Ka  ; interindividual variability on Ka
$SIGMA  0.1  ;   ERR_PROP  ; proportional error
$ESTIMATION MAXEVAL=9999 PRINT=5 NOABORT METHOD=1 INTER MSFO=mod.msf
$COVARIANCE PRINT=E
$TABLE      NOPRINT FILE=mod.tab ONEHEADER ID ; ID       ; NONMEM subject identifier
            AMT ; AMT      ; dose amount                                   ; mg
            TIME ; TIME     ; time                                          ; h
            EVID ; EVID     ; event type                                    ; //0/observation//1/dose
            PRED ; PRED     ; population prediction                         ; ng/mL
            IPRE ; IPRED    ; individual prediction                         ; ng/mL
            CWRESI ; CWRESI   ; conditional weighted residual
            CIWRESI ; CIWRESI  ; conditional indvividual weighted residual
$TABLE      NOPRINT FILE=mod2.tab ONEHEADER ID ; ID       ; NONMEM subject identifier
            TIME ; TIME     ; time                                          ; h
            CL ; CLI      ; posthoc systemic clearance                    ; L/h
            V ; V2I      ; posthoc systemic volume                       ; L
            KA ; KAI      ; posthoc absorption rate                       ; 1/h
            ETA1 ; BSV_CL   ; clearance between-subject variability
            ETA2 ; BSV_V2   ; volume between-subject variability
            ETA3 ; BSV_KA   ; absorption between-subject variability

NM-TRAN MESSAGES
 WARNINGS AND ERRORS (IF ANY) FOR PROBLEM    1
 (WARNING  2) NM-TRAN INFERS THAT THE DATA ARE POPULATION.

1NONLINEAR MIXED EFFECTS MODEL PROGRAM (NONMEM) VERSION 7.3.0
 ORIGINALLY DEVELOPED BY STUART BEAL, LEWIS SHEINER, AND ALISON BOECKMANN
 CURRENT DEVELOPERS ARE ROBERT BAUER, ICON DEVELOPMENT SOLUTIONS,
 AND ALISON BOECKMANN. IMPLEMENTATION, EFFICIENCY, AND STANDARDIZATION
 PERFORMED BY NOUS INFOSYSTEMS.
 PROBLEM NO.:         1
 //like/2001//but/1 cmt,diag. omega,prop. err.//
 TOT. NO. OF OBS RECS:      510
 TOT. NO. OF INDIVIDUALS:     40
 ONE COMPARTMENT MODEL WITH FIRST-ORDER ABSORPTION (ADVAN2)
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 #TBLN:      1
 #METH: First Order Conditional Estimation with Interaction
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
 #TERM:
0MINIMIZATION SUCCESSFUL
 NO. OF FUNCTION EVALUATIONS USED:      166
 NO. OF SIG. DIGITS IN FINAL EST.:  4.0

 ETABAR IS THE ARITHMETIC MEAN OF THE ETA-ESTIMATES,
 AND THE P-VALUE IS GIVEN FOR THE NULL HYPOTHESIS THAT THE TRUE MEAN IS 0.

 ETABAR:         2.0937E-03 -2.0936E-03  1.0872E-02
 SE:             3.7807E-02  3.7805E-02  3.6571E-02
 N:                      40          40          40

 P VAL.:         9.5584E-01  9.5584E-01  7.6625E-01

 ETAshrink(%):   3.0408E+01  3.0409E+01  9.7274E+00
 EBVshrink(%):   3.1320E+01  3.1321E+01  1.1174E+01
 EPSshrink(%):   5.0798E+00


 #TERE:
 Elapsed estimation time in seconds:     1.83
0R MATRIX ALGORITHMICALLY SINGULAR
 AND ALGORITHMICALLY NON-POSITIVE-SEMIDEFINITE
0R MATRIX IS OUTPUT
0COVARIANCE STEP ABORTED
 Elapsed covariance time in seconds:     0.76

 ********************               FIRST ORDER CONDITIONAL ESTIMATION WITH INTERACTION              ********************
 #OBJT:**************                       MINIMUM VALUE OF OBJECTIVE FUNCTION                      ********************
 #OBJV:********************************************     3037.354       **************************************************

 ********************               FIRST ORDER CONDITIONAL ESTIMATION WITH INTERACTION              ********************
 ********************                             FINAL PARAMETER ESTIMATE                           ********************

 THETA - VECTOR OF FIXED EFFECTS PARAMETERS   *********
         TH 1      TH 2      TH 3
         3.94E+01  3.19E+00  3.95E-02

 OMEGA - COV MATRIX FOR RANDOM EFFECTS - ETAS  ********
            ETA1      ETA2      ETA3
 ETA1
+        1.21E-01
 ETA2
+        0.00E+00  1.21E-01
 ETA3
+        0.00E+00  0.00E+00  6.73E-02

 SIGMA - COV MATRIX FOR RANDOM EFFECTS - EPSILONS  ****
            EPS1
 EPS1
+        1.95E-01

 OMEGA - CORR MATRIX FOR RANDOM EFFECTS - ETAS  *******
            ETA1      ETA2      ETA3
 ETA1
+        3.48E-01
 ETA2
+        0.00E+00  3.48E-01
 ETA3
+        0.00E+00  0.00E+00  2.59E-01

 SIGMA - CORR MATRIX FOR RANDOM EFFECTS - EPSILONS  ***
            EPS1
 EPS1
+        4.42E-01
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 #CPUT: Total CPU Time in Seconds,        2.681
